// SBML level 2 version 1

model ECC_Base()

  // Compartments:
  compartment rootCompartment = 1;

  // Species:
  substanceOnly species INSR in rootCompartment = 500;
  substanceOnly species INSRpY in rootCompartment = 500;
  substanceOnly species IRS in rootCompartment = 500;
  substanceOnly species IRSi in rootCompartment = 500;
  substanceOnly species S6KpT389 in rootCompartment = 500;
  substanceOnly species PI3K in rootCompartment = 500;
  substanceOnly species INSRccIRSccPI3K in rootCompartment = 500;
  substanceOnly species PDK1 in rootCompartment = 500;
  substanceOnly species PDK1b in rootCompartment = 500;
  substanceOnly species MTORC2 in rootCompartment = 500;
  substanceOnly species MTORC2b in rootCompartment = 500;
  substanceOnly species AKT in rootCompartment = 500;
  substanceOnly species AKTpT308 in rootCompartment = 500;
  substanceOnly species AKTpS473 in rootCompartment = 500;
  substanceOnly species AKTpp in rootCompartment = 500;
  substanceOnly species MTORC1 in rootCompartment = 500;
  substanceOnly species MTORC1a in rootCompartment = 500;
  substanceOnly species ERKpp in rootCompartment = 500;
  substanceOnly species CDK46ccCYCD in rootCompartment = 500;
  substanceOnly species MTORC1i in rootCompartment = 500;
  substanceOnly species S6K in rootCompartment = 500;
  substanceOnly species GSK3B in rootCompartment = 500;
  substanceOnly species GSK3Bi in rootCompartment = 500;
  substanceOnly species SOS in rootCompartment = 500;
  substanceOnly species INSRccIRSccSOS in rootCompartment = 500;
  substanceOnly species SOSi in rootCompartment = 500;
  substanceOnly species RAF in rootCompartment = 500;
  substanceOnly species RAFa in rootCompartment = 500;
  substanceOnly species RAFi in rootCompartment = 500;
  substanceOnly species ERK in rootCompartment = 500;
  substanceOnly species MYC in rootCompartment = 500;
  substanceOnly species E2F in rootCompartment = 500;
  substanceOnly species MYCpS62 in rootCompartment = 500;
  substanceOnly species CDK2ccCYCE in rootCompartment = 500;
  substanceOnly species MYCpp in rootCompartment = 500;
  substanceOnly species CYCD in rootCompartment = 500;
  substanceOnly species CYCDpT286 in rootCompartment = 500;
  substanceOnly species CYCE in rootCompartment = 500;
  substanceOnly species CYCEpT380 in rootCompartment = 500;
  substanceOnly species P21 in rootCompartment = 500;
  substanceOnly species P21pT57 in rootCompartment = 500;
  substanceOnly species P27 in rootCompartment = 500;
  substanceOnly species P27pT187 in rootCompartment = 500;
  substanceOnly species P27i in rootCompartment = 500;
  substanceOnly species CDK46 in rootCompartment = 500;
  substanceOnly species CDK46ccCYCDp in rootCompartment = 500;
  substanceOnly species CDK2 in rootCompartment = 500;
  substanceOnly species CDK2ccCYCEp in rootCompartment = 500;
  substanceOnly species RB in rootCompartment = 500;
  substanceOnly species RBp in rootCompartment = 500;
  substanceOnly species RBpp in rootCompartment = 500;
  substanceOnly species E2FccRB in rootCompartment = 500;
  substanceOnly species E2FccRBp in rootCompartment = 500;
  substanceOnly species E2FccRBpp in rootCompartment = 500;
  substanceOnly species CDK46ccCYCDccP21 in rootCompartment = 500;
  substanceOnly species CDK46ccCYCDccP27 in rootCompartment = 500;
  substanceOnly species CDK2ccCYCEccP21 in rootCompartment = 500;
  substanceOnly species CDK2ccCYCEccP27 in rootCompartment = 500;
  substanceOnly species CDK2ccCYCEccP27p in rootCompartment = 500;

  // Parameters:
  kc_INSULIN_INSR_INSRpY = 0.1;
  Vm_INSRpY_INSR = 10;
  kc_S6KpT389_IRS_IRSi = 0.1;
  Vm_IRSi_IRS = 10;
  ka_INSRpY_IRS_PI3K_INSRccIRSccPI3K = 0.001;
  kd_INSRccIRSccPI3K_INSR_IRS_PI3K = 0.01;
  kc_INSRccIRSccPI3K_PDK1_PDK1b = 0.1;
  kc_PTEN_PDK1b_PDK1 = 0.1;
  kc_INSRccIRSccPI3K_MTORC2_MTORC2b = 0.1;
  kc_PTEN_MTORC2b_MTORC2 = 0.1;
  kc_PDK1b_AKT_AKTpT308 = 0.1;
  Vm_AKTpT308_AKT = 10;
  kc_MTORC2b_AKT_AKTpS473 = 0.1;
  Vm_AKTpS473_AKT = 10;
  kc_MTORC2b_AKTpT308_AKTpp = 0.1;
  kc_PDK1b_AKTpS473_AKTpp = 0.1;
  Vm_AKTpp_AKT = 10;
  kc_AKTact_MTORC1_MTORC1a = 0.1;
  kc_ERKpp_MTORC1_MTORC1a = 0.1;
  kc_CDK46ccCYCD_MTORC1_MTORC1a = 0.1;
  Vm_MTORC1a_MTORC1 = 10;
  kc_S6KpT389_MTORC1_MTORC1i = 0.1;
  Vm_MTORC1i_MTORC1 = 10;
  kc_MTORC1a_S6K_S6KpT389 = 0.1;
  Vm_S6KpT389_S6K = 10;
  kc_AKTact_GSK3B_GSK3Bi = 0.1;
  kc_S6KpT389_GSK3B_GSK3Bi = 0.1;
  Vm_GSK3Bi_GSK3B = 10;
  ka_INSRpY_IRS_SOS_INSRccIRSccSOS = 0.001;
  kd_INSRccIRSccSOS_INSR_IRS_SOS = 0.01;
  kc_ERKpp_SOS_SOSi = 0.1;
  Vm_SOSi_SOS = 10;
  kc_INSRccIRSccSOS_RAF_RAFa = 0.1;
  Vm_RAFa_RAF = 10;
  kc_ERKpp_RAF_RAFi = 0.1;
  kc_AKTact_RAF_RAFi = 0.1;
  Vm_RAFi_RAF = 10;
  kc_RAFa_ERK_ERKpp = 0.1;
  Vm_ERKpp_ERK = 10;
  ksyn_E2F_MYC = 10;
  Km_E2F_MYC = 100;
  kc_ERKpp_MYC_MYCpS62 = 0.1;
  kc_CDK2ccCYCE_MYC_MYCpS62 = 0.1;
  kc_GSK3B_MYCpS62_MYCpp = 0.1;
  kdcy_MYCpp = 240;
  ksyn_MTORC1a_CYCD = 10;
  Km_MTORC1a_CYCD = 100;
  ksyn_ERKpp_CYCD = 10;
  Km_ERKpp_CYCD = 100;
  kc_GSK3B_CYCD_CYCDpT286 = 0.1;
  kdcy_CYCDpT286 = 240;
  ksyn_E2F_CYCE = 10;
  Km_E2F_CYCE = 100;
  ksyn_MYCact_CYCE = 10;
  Km_MYCact_CYCE = 100;
  kc_GSK3B_CYCE_CYCEpT380 = 0.1;
  kdcy_CYCEpT380 = 240;
  ksyn_P21 = 10;
  kc_GSK3B_P21_P21pT57 = 0.1;
  kdcy_P21pT57 = 240;
  ksyn_P27 = 10;
  kdcy_P27pT187 = 240;
  kc_AKTact_P27_P27i = 0.1;
  Vm_P27i_P27 = 10;
  ka_CDK46_CYCD_CDK46ccCYCD = 0.001;
  kd_CDK46ccCYCD_CDK46_CYCD = 0.01;
  kc_GSK3B_CDK46ccCYCD_CDK46ccCYCDp = 0.1;
  kd_CDK46ccCYCDp_CDK46_CYCDpT286 = 0.01;
  ka_CDK2_CYCE_CDK2ccCYCE = 0.001;
  kd_CDK2ccCYCE_CDK2_CYCE = 0.01;
  Vm_CDK2ccCYCE_CDK2ccCYCEp = 10;
  kd_CDK2ccCYCEp_CDK2_CYCEpT380 = 0.01;
  kc_CDK46ccCYCD_RB_RBp = 0.1;
  Vm_RBp_RB = 10;
  kc_CDK2ccCYCE_RBp_RBpp = 0.1;
  kc_CDK2ccCYCE_RB_RBpp = 0.1;
  Vm_RBpp_RB = 10;
  ka_E2F_RB_E2FccRB = 0.001;
  kd_E2FccRB_E2F_RB = 0.01;
  ka_E2F_RBp_E2FccRBp = 0.001;
  kd_E2FccRBp_E2F_RBp = 0.01;
  kd_E2FccRBpp_E2F_RBpp = 0.01;
  kc_CDK46ccCYCD_E2FccRB_E2FccRBp = 0.1;
  kc_CDK2ccCYCE_E2FccRBp_E2FccRBpp = 0.1;
  kc_CDK2ccCYCE_E2FccRB_E2FccRBpp = 0.1;
  ka_CDK46ccCYCD_P21_CDK46ccCYCDccP21 = 0.001;
  kd_CDK46ccCYCDccP21_CDK46ccCYCD_P21 = 0.01;
  ka_CDK46ccCYCD_P27_CDK46ccCYCDccP27 = 0.001;
  kd_CDK46ccCYCDccP27_CDK46ccCYCD_P27 = 0.01;
  ka_CDK2ccCYCE_P21_CDK2ccCYCEccP21 = 0.001;
  kd_CDK2ccCYCEccP21_CDK2ccCYCE_P21 = 0.01;
  ka_CDK2ccCYCE_P27_CDK2ccCYCEccP27 = 0.001;
  kd_CDK2ccCYCEccP27_CDK2ccCYCE_P27 = 0.01;
  Vm_CDK2ccCYCEccP27_CDK2ccCYCEccP27p = 10;
  kd_CDK2ccCYCEccP27p_CDK2ccCYCE_P27pT187 = 0.01;
  alpha_SYN_P21__MYCact = 1;
  alpha_SYN_P27__MYCact = 1;
  alpha_CDK46i = 1;
  alpha_MMS_RB_RBp_CDK46ccCYCD_CDK46i = 1;
  alpha_MMS_E2FccRB_E2FccRBp_CDK46ccCYCD_CDK46i = 1;
  alpha_MMS_MTORC1_MTORC1a_CDK46ccCYCD_CDK46i = 1;
  alpha_AKTpp = 1;
  alpha_AKTpT308 = 1;
  alpha_AKTpS473 = 1;
  alpha_MYC = 1;
  alpha_MYCpS62 = 1;
  input_INSULIN = 500;
  inptime_INSULIN = 1;
  const_PTEN = 500;
  input_CDK46i = 500;
  inptime_CDK46i = 1;

  // Assignment rules:
  AKTact := alpha_AKTpp*AKTpp + alpha_AKTpT308*AKTpT308 + alpha_AKTpS473*AKTpS473;
  MYCact := alpha_MYC*MYC + alpha_MYCpS62*MYCpS62;
  INSULIN := input_INSULIN*piecewise(1, time >= inptime_INSULIN, 0);
  PTEN := const_PTEN;
  CYCD_total := CYCD + CYCDpT286 + CDK46ccCYCD + CDK46ccCYCDp + CDK46ccCYCDccP21 + CDK46ccCYCDccP27;
  CDK46i := input_CDK46i*piecewise(1, time >= inptime_CDK46i, 0);
  AKTpS473_Data := AKTpp + AKTpS473;
  AKTpT308_Data := AKTpp + AKTpT308;
  MYC_Data := MYC + MYCpS62 + MYCpp;
  CYCDpT286_Data := CDK46ccCYCDp + CYCDpT286;
  CYCE_Data := CYCE + CYCEpT380 + CDK2ccCYCE + CDK2ccCYCEp + CDK2ccCYCEccP21 + CDK2ccCYCEccP27 + CDK2ccCYCEccP27p;
  ERKpp_Data := ERKpp;
  IRSpS636_Data := IRSi;
  MTORpS2448_Data := MTORC1i;
  P21_Data := P21 + P21pT57 + CDK46ccCYCDccP21 + CDK2ccCYCEccP21;
  P27_Data := P27 + P27pT187 + P27i + CDK46ccCYCDccP27 + CDK2ccCYCEccP27 + CDK2ccCYCEccP27p;
  S6KpT389_Data := S6KpT389;
  RBpS807_Data := RBp + RBpp + E2FccRBp + E2FccRBpp;

  // Reactions:
  R1: INSR => INSRpY; kc_INSULIN_INSR_INSRpY*INSULIN*INSR;
  R2: INSRpY => INSR; Vm_INSRpY_INSR*INSRpY;
  R3: IRS => IRSi; kc_S6KpT389_IRS_IRSi*S6KpT389*IRS;  // modifiers: S6KpT389
  R4: IRSi => IRS; Vm_IRSi_IRS*IRSi;
  R5: INSRpY + IRS + PI3K => INSRccIRSccPI3K; ka_INSRpY_IRS_PI3K_INSRccIRSccPI3K*INSRpY*IRS*PI3K;
  R6: INSRccIRSccPI3K => INSR + IRS + PI3K; kd_INSRccIRSccPI3K_INSR_IRS_PI3K*INSRccIRSccPI3K;
  R7: PDK1 => PDK1b; kc_INSRccIRSccPI3K_PDK1_PDK1b*INSRccIRSccPI3K*PDK1;  // modifiers: INSRccIRSccPI3K
  R8: PDK1b => PDK1; kc_PTEN_PDK1b_PDK1*PTEN*PDK1b;
  R9: MTORC2 => MTORC2b; kc_INSRccIRSccPI3K_MTORC2_MTORC2b*INSRccIRSccPI3K*MTORC2;  // modifiers: INSRccIRSccPI3K
  R10: MTORC2b => MTORC2; kc_PTEN_MTORC2b_MTORC2*PTEN*MTORC2b;
  R11: AKT => AKTpT308; kc_PDK1b_AKT_AKTpT308*PDK1b*AKT;  // modifiers: PDK1b
  R12: AKTpT308 => AKT; Vm_AKTpT308_AKT*AKTpT308;
  R13: AKT => AKTpS473; kc_MTORC2b_AKT_AKTpS473*MTORC2b*AKT;  // modifiers: MTORC2b
  R14: AKTpS473 => AKT; Vm_AKTpS473_AKT*AKTpS473;
  R15: AKTpT308 => AKTpp; kc_MTORC2b_AKTpT308_AKTpp*MTORC2b*AKTpT308;  // modifiers: MTORC2b
  R16: AKTpS473 => AKTpp; kc_PDK1b_AKTpS473_AKTpp*PDK1b*AKTpS473;  // modifiers: PDK1b
  R17: AKTpp => AKT; Vm_AKTpp_AKT*AKTpp;
  R18: MTORC1 => MTORC1a; kc_AKTact_MTORC1_MTORC1a*AKTact*MTORC1 + kc_ERKpp_MTORC1_MTORC1a*ERKpp*MTORC1 + kc_CDK46ccCYCD_MTORC1_MTORC1a*CDK46ccCYCD*MTORC1*(1/(1 + alpha_MMS_MTORC1_MTORC1a_CDK46ccCYCD_CDK46i*CDK46i));  // modifiers: AKTpS473, AKTpT308, AKTpp, CDK46ccCYCD, ERKpp
  R19: MTORC1a => MTORC1; Vm_MTORC1a_MTORC1*MTORC1a;
  R20: MTORC1 => MTORC1i; kc_S6KpT389_MTORC1_MTORC1i*S6KpT389*MTORC1;  // modifiers: S6KpT389
  R21: MTORC1i => MTORC1; Vm_MTORC1i_MTORC1*MTORC1i;
  R22: S6K => S6KpT389; kc_MTORC1a_S6K_S6KpT389*MTORC1a*S6K;  // modifiers: MTORC1a
  R23: S6KpT389 => S6K; Vm_S6KpT389_S6K*S6KpT389;
  R24: GSK3B => GSK3Bi; kc_AKTact_GSK3B_GSK3Bi*AKTact*GSK3B + kc_S6KpT389_GSK3B_GSK3Bi*S6KpT389*GSK3B;  // modifiers: AKTpS473, AKTpT308, AKTpp, S6KpT389
  R25: GSK3Bi => GSK3B; Vm_GSK3Bi_GSK3B*GSK3Bi;
  R26: INSRpY + IRS + SOS => INSRccIRSccSOS; ka_INSRpY_IRS_SOS_INSRccIRSccSOS*INSRpY*IRS*SOS;
  R27: INSRccIRSccSOS => INSR + IRS + SOS; kd_INSRccIRSccSOS_INSR_IRS_SOS*INSRccIRSccSOS;
  R28: SOS => SOSi; kc_ERKpp_SOS_SOSi*ERKpp*SOS;  // modifiers: ERKpp
  R29: SOSi => SOS; Vm_SOSi_SOS*SOSi;
  R30: RAF => RAFa; kc_INSRccIRSccSOS_RAF_RAFa*INSRccIRSccSOS*RAF;  // modifiers: INSRccIRSccSOS
  R31: RAFa => RAF; Vm_RAFa_RAF*RAFa;
  R32: RAF => RAFi; kc_ERKpp_RAF_RAFi*ERKpp*RAF + kc_AKTact_RAF_RAFi*AKTact*RAF;  // modifiers: AKTpS473, AKTpT308, AKTpp, ERKpp
  R33: RAFi => RAF; Vm_RAFi_RAF*RAFi;
  R34: ERK => ERKpp; kc_RAFa_ERK_ERKpp*RAFa*ERK;  // modifiers: RAFa
  R35: ERKpp => ERK; Vm_ERKpp_ERK*ERKpp;
  R36: => MYC; ksyn_E2F_MYC*E2F/(Km_E2F_MYC + E2F);  // modifiers: E2F
  R37: MYC => MYCpS62; kc_ERKpp_MYC_MYCpS62*ERKpp*MYC + kc_CDK2ccCYCE_MYC_MYCpS62*CDK2ccCYCE*MYC;  // modifiers: CDK2ccCYCE, ERKpp
  R38: MYCpS62 => MYCpp; kc_GSK3B_MYCpS62_MYCpp*GSK3B*MYCpS62;  // modifiers: GSK3B
  R39: MYCpp => ; 0.69315/kdcy_MYCpp*MYCpp;
  R40: => CYCD; ksyn_MTORC1a_CYCD*MTORC1a/(Km_MTORC1a_CYCD + MTORC1a) + ksyn_ERKpp_CYCD*ERKpp/(Km_ERKpp_CYCD + ERKpp);  // modifiers: ERKpp, MTORC1a
  R41: CYCD => CYCDpT286; kc_GSK3B_CYCD_CYCDpT286*GSK3B*CYCD;  // modifiers: GSK3B
  R42: CYCDpT286 => ; 0.69315/kdcy_CYCDpT286*CYCDpT286;
  R43: => CYCE; ksyn_E2F_CYCE*E2F/(Km_E2F_CYCE + E2F) + ksyn_MYCact_CYCE*MYCact/(Km_MYCact_CYCE + MYCact);  // modifiers: E2F, MYC, MYCpS62
  R44: CYCE => CYCEpT380; kc_GSK3B_CYCE_CYCEpT380*GSK3B*CYCE;  // modifiers: GSK3B
  R45: CYCEpT380 => ; 0.69315/kdcy_CYCEpT380*CYCEpT380;
  R46: => P21; ksyn_P21*(1/(1 + alpha_SYN_P21__MYCact*MYCact));  // modifiers: MYC, MYCpS62
  R47: P21 => P21pT57; kc_GSK3B_P21_P21pT57*GSK3B*P21;  // modifiers: GSK3B
  R48: P21pT57 => ; 0.69315/kdcy_P21pT57*P21pT57;
  R49: => P27; ksyn_P27*(1/(1 + alpha_SYN_P27__MYCact*MYCact));  // modifiers: MYC, MYCpS62
  R50: P27pT187 => ; 0.69315/kdcy_P27pT187*P27pT187;
  R51: P27 => P27i; kc_AKTact_P27_P27i*AKTact*P27;  // modifiers: AKTpS473, AKTpT308, AKTpp
  R52: P27i => P27; Vm_P27i_P27*P27i;
  R53: CYCD + CDK46 => CDK46ccCYCD; ka_CDK46_CYCD_CDK46ccCYCD*CDK46*CYCD;
  R54: CDK46ccCYCD => CYCD + CDK46; kd_CDK46ccCYCD_CDK46_CYCD*CDK46ccCYCD;
  R55: CDK46ccCYCD => CDK46ccCYCDp; kc_GSK3B_CDK46ccCYCD_CDK46ccCYCDp*GSK3B*CDK46ccCYCD;  // modifiers: GSK3B
  R56: CDK46ccCYCDp => CYCDpT286 + CDK46; kd_CDK46ccCYCDp_CDK46_CYCDpT286*CDK46ccCYCDp;
  R57: CYCE + CDK2 => CDK2ccCYCE; ka_CDK2_CYCE_CDK2ccCYCE*CDK2*CYCE;
  R58: CDK2ccCYCE => CYCE + CDK2; kd_CDK2ccCYCE_CDK2_CYCE*CDK2ccCYCE;
  R59: CDK2ccCYCE => CDK2ccCYCEp; Vm_CDK2ccCYCE_CDK2ccCYCEp*CDK2ccCYCE;
  R60: CDK2ccCYCEp => CYCEpT380 + CDK2; kd_CDK2ccCYCEp_CDK2_CYCEpT380*CDK2ccCYCEp;
  R61: RB => RBp; kc_CDK46ccCYCD_RB_RBp*CDK46ccCYCD*RB*(1/(1 + alpha_MMS_RB_RBp_CDK46ccCYCD_CDK46i*CDK46i));  // modifiers: CDK46ccCYCD
  R62: RBp => RB; Vm_RBp_RB*RBp;
  R63: RBp => RBpp; kc_CDK2ccCYCE_RBp_RBpp*CDK2ccCYCE*RBp;  // modifiers: CDK2ccCYCE
  R64: RB => RBpp; kc_CDK2ccCYCE_RB_RBpp*CDK2ccCYCE*RB;  // modifiers: CDK2ccCYCE
  R65: RBpp => RB; Vm_RBpp_RB*RBpp;
  R66: E2F + RB => E2FccRB; ka_E2F_RB_E2FccRB*E2F*RB;
  R67: E2FccRB => E2F + RB; kd_E2FccRB_E2F_RB*E2FccRB;
  R68: E2F + RBp => E2FccRBp; ka_E2F_RBp_E2FccRBp*E2F*RBp;
  R69: E2FccRBp => E2F + RBp; kd_E2FccRBp_E2F_RBp*E2FccRBp;
  R70: E2FccRBpp => E2F + RBpp; kd_E2FccRBpp_E2F_RBpp*E2FccRBpp;
  R71: E2FccRB => E2FccRBp; kc_CDK46ccCYCD_E2FccRB_E2FccRBp*CDK46ccCYCD*E2FccRB*(1/(1 + alpha_MMS_E2FccRB_E2FccRBp_CDK46ccCYCD_CDK46i*CDK46i));  // modifiers: CDK46ccCYCD
  R72: E2FccRBp => E2FccRBpp; kc_CDK2ccCYCE_E2FccRBp_E2FccRBpp*CDK2ccCYCE*E2FccRBp;  // modifiers: CDK2ccCYCE
  R73: E2FccRB => E2FccRBpp; kc_CDK2ccCYCE_E2FccRB_E2FccRBpp*CDK2ccCYCE*E2FccRB;  // modifiers: CDK2ccCYCE
  R74: CDK46ccCYCD + P21 => CDK46ccCYCDccP21; ka_CDK46ccCYCD_P21_CDK46ccCYCDccP21*CDK46ccCYCD*P21;
  R75: CDK46ccCYCDccP21 => CDK46ccCYCD + P21; kd_CDK46ccCYCDccP21_CDK46ccCYCD_P21*CDK46ccCYCDccP21*(1 + alpha_CDK46i*CDK46i);
  R76: CDK46ccCYCD + P27 => CDK46ccCYCDccP27; ka_CDK46ccCYCD_P27_CDK46ccCYCDccP27*CDK46ccCYCD*P27;
  R77: CDK46ccCYCDccP27 => CDK46ccCYCD + P27; kd_CDK46ccCYCDccP27_CDK46ccCYCD_P27*CDK46ccCYCDccP27;
  R78: CDK2ccCYCE + P21 => CDK2ccCYCEccP21; ka_CDK2ccCYCE_P21_CDK2ccCYCEccP21*CDK2ccCYCE*P21;
  R79: CDK2ccCYCEccP21 => CDK2ccCYCE + P21; kd_CDK2ccCYCEccP21_CDK2ccCYCE_P21*CDK2ccCYCEccP21;
  R80: CDK2ccCYCE + P27 => CDK2ccCYCEccP27; ka_CDK2ccCYCE_P27_CDK2ccCYCEccP27*CDK2ccCYCE*P27;
  R81: CDK2ccCYCEccP27 => CDK2ccCYCE + P27; kd_CDK2ccCYCEccP27_CDK2ccCYCE_P27*CDK2ccCYCEccP27;
  R82: CDK2ccCYCEccP27 => CDK2ccCYCEccP27p; Vm_CDK2ccCYCEccP27_CDK2ccCYCEccP27p*CDK2ccCYCEccP27;
  R83: CDK2ccCYCEccP27p => CDK2ccCYCE + P27pT187; kd_CDK2ccCYCEccP27p_CDK2ccCYCE_P27pT187*CDK2ccCYCEccP27p;
end
